*Heading
** Job name: cantelverjob Model name: Model-1
** Generated by: Abaqus/CAE 2017
*Preprint, echo=NO, model=NO, history=NO, contact=NO
**
** PARTS
**
*Part, name=cantlever123
*Node
      1,       -31.75,          45.,           6.
      2,       -31.75,          40.,           6.
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*Element, type=C3D10
   1,  457,  458,  265,  278,  595,  594,  593,  597,  596,  598
   2,  457,  399,  459,  397,  601,  600,  599,  603,  602,  604
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*Nset, nset=Set-1, generate
    1,  3604,     1
*Elset, elset=Set-1, generate
    1,  1964,     1
** Section: Section-1
*Solid Section, elset=Set-1, material=steel
,
*End Part
**
**
** ASSEMBLY
**
*Assembly, name=Assembly
**
*Instance, name=cantlever123-1, part=cantlever123
*End Instance
**
*Instance, name=cantlever123-2, part=cantlever123
*End Instance
**
*Nset, nset=Set-1, instance=cantlever123-2
   11,   12,   13,   14,  107,  108
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*Elset, elset=Set-1, instance=cantlever123-2
  125,  209,  210,  282,  301,  330
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*Elset, elset=_Surf-1_S2, internal, instance=cantlever123-2
   76,  996, 1038, 1041, 1044, 1763
*Elset, elset=_Surf-1_S4, internal, instance=cantlever123-2
  499,  998, 1019, 1030, 1047, 1467
*Elset, elset=_Surf-1_S3, internal, instance=cantlever123-2
  721,  784,  789,  923,  938,  984
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*Elset, elset=_Surf-1_S1, internal, instance=cantlever123-2
 774,
*Surface, type=ELEMENT, name=Surf-1
_Surf-1_S2, S2
_Surf-1_S4, S4
_Surf-1_S3, S3
_Surf-1_S1, S1
*Elset, elset=_Surf-2_S2, internal, instance=cantlever123-2
   76,  996, 1038, 1041, 1044, 1763
*Elset, elset=_Surf-2_S4, internal, instance=cantlever123-2
  499,  998, 1019, 1030, 1047, 1467
*Elset, elset=_Surf-2_S3, internal, instance=cantlever123-2
  721,  784,  789,  923,  938,  984
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*Elset, elset=_Surf-2_S1, internal, instance=cantlever123-2
 774,
*Surface, type=ELEMENT, name=Surf-2
_Surf-2_S2, S2
_Surf-2_S4, S4
_Surf-2_S3, S3
_Surf-2_S1, S1
*End Assembly
**
** MATERIALS
**
*Material, name=steel
*Elastic
210000., 0.3
** ----------------------------------------------------------------
**
** STEP: Step-1
**
*Step, name=Step-1, nlgeom=NO
*Static
1., 1., 1e-05, 1.
**
** BOUNDARY CONDITIONS
**
** Name: BC-1 Type: Displacement/Rotation
*Boundary
Set-1, 1, 1
Set-1, 2, 2
Set-1, 3, 3
Set-1, 4, 4
Set-1, 5, 5
Set-1, 6, 6
**
** LOADS
**
** Name: Load-50   Type: Pressure
*Dsload
Surf-2, P, 10.
**
** OUTPUT REQUESTS
**
*Restart, write, frequency=0
**
** FIELD OUTPUT: F-Output-1
**
*Output, field, variable=PRESELECT
**
** HISTORY OUTPUT: H-Output-1
**
*Output, history, variable=PRESELECT
*End Step
