*Heading
** Job name: layerdsoil Model name: Model-1
** Generated by: Abaqus/CAE 2017
*Preprint, echo=NO, model=NO, history=NO, contact=NO
**
** PARTS
**
*Part, name=Part-1
*Node
      1,          55.,          55.
      2,          5.5,          55.
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*Element, type=CAX4R
  1,    1,   19,  382,  122
  2,   19,   20,  383,  382
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*Nset, nset=Set-1
    7,    8,    9,   10,   16,   17
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*Elset, elset=Set-1
  778,  779,  780,  781,  782,  783
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*Nset, nset=Set-2
    8,    9,   11,   12,   17,   18
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*Elset, elset=Set-2
  844,  845,  846,  847,  848,  849
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*Nset, nset=Set-3
   11,   12,   13,   14,   15,   18
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*Elset, elset=Set-3
  976,  977,  978,  979,  980,  981
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*Nset, nset=Set-4
    1,    2,    3,    4,    5,    6
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*Elset, elset=Set-4
    1,    2,    3,    4,    5,    6
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** Section: exitsiolsSecrion
*Solid Section, elset=Set-4, material=exitSoilLayer
,
** Section: asphaltSection
*Solid Section, elset=Set-1, material=asphalt
,
** Section: baseSection
*Solid Section, elset=Set-2, material=baselayer
,
** Section: subbaseSection
*Solid Section, elset=Set-3, material=subBaseLayer
,
*End Part
**
**
** ASSEMBLY
**
*Assembly, name=Assembly
**
*Instance, name=Part-1-1, part=Part-1
*End Instance
**
*Nset, nset=Set-1, instance=Part-1-1
   3,   4,  71,  72,  73,  74
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*Elset, elset=Set-1, instance=Part-1-1, generate
 661,  693,    1
*Nset, nset=Set-2, instance=Part-1-1
   3,   6, 146, 147, 148
*Elset, elset=Set-2, instance=Part-1-1, generate
 774,  777,    1
*Nset, nset=Set-3, instance=Part-1-1
   1,   4,   9,  10,  12,  14
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*Elset, elset=Set-3, instance=Part-1-1
    1,   34,   67,  100,  133,  166
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*Nset, nset=Set-4, instance=Part-1-1
   5,   6,  15,  16,  17,  18
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*Elset, elset=Set-4, instance=Part-1-1
  697,  701,  705,  709,  713,  717
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*Elset, elset=_Surf-1_S2, internal, instance=Part-1-1, generate
 1209,  1215,     2
*Surface, type=ELEMENT, name=Surf-1
_Surf-1_S2, S2
*End Assembly
**
** MATERIALS
**
*Material, name=asphalt
*Elastic
 7e+11, 0.3
*Material, name=baselayer
*Elastic
 7e+10, 0.3
*Material, name=exitSoilLayer
*Elastic
 7e+08, 0.3
*Material, name=subBaseLayer
*Elastic
 7e+09, 0.3
** ----------------------------------------------------------------
**
** STEP: Step-1
**
*Step, name=Step-1, nlgeom=YES
*Static
0.1, 1., 1e-05, 1.
**
** BOUNDARY CONDITIONS
**
** Name: BC-1 Type: Displacement/Rotation
*Boundary
Set-1, 1, 1
Set-1, 2, 2
** Name: BC-2 Type: Displacement/Rotation
*Boundary
Set-2, 1, 1
Set-2, 2, 2
** Name: BC-3 Type: Displacement/Rotation
*Boundary
Set-3, 1, 1
** Name: BC-4 Type: Symmetry/Antisymmetry/Encastre
*Boundary
Set-4, XSYMM
**
** LOADS
**
** Name: Load-1   Type: Pressure
*Dsload
Surf-1, P, 10000.
**
** OUTPUT REQUESTS
**
*Restart, write, frequency=0
**
** FIELD OUTPUT: F-Output-1
**
*Output, field, variable=PRESELECT
**
** HISTORY OUTPUT: H-Output-1
**
*Output, history, variable=PRESELECT
*End Step
