*Heading
** Job name: multi-layer-considlate Model name: Model-1
** Generated by: Abaqus/CAE 2017
*Preprint, echo=NO, model=NO, history=NO, contact=NO
**
** PARTS
**
*Part, name=Part-1
*Node
      1,   22.7000008,           7.
      2,   22.7000008,           6.
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*Element, type=CPE8RP
 1,    1,   33,  385,   64,  903,  904,  905,  906
 2,   33,   34,  386,  385,  907,  908,  909,  904
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*Nset, nset=Set-1
    1,    2,    3,    4,    5,    6
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*Elset, elset=Set-1
   1,   2,   3,   4,   5,   6
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*Nset, nset=Set-2
    2,    3,    6,    7,    8,    9
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*Elset, elset=Set-2
  76,  77,  78,  79,  80,  81
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*Nset, nset=Set-3
    7,    8,    9,   10,   11,   12
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*Elset, elset=Set-3
 151, 152, 153, 154, 155, 156
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*Nset, nset=Set-4
   10,   11,   12,   13,   14,   15
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*Elset, elset=Set-4
 226, 227, 228, 229, 230, 231
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*Nset, nset=Set-5
   13,   14,   15,   16,   17,   18
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*Elset, elset=Set-5
 301, 302, 303, 304, 305, 306
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*Nset, nset=Set-6
   16,   17,   18,   19,   20,   21
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*Elset, elset=Set-6
 376, 377, 378, 379, 380, 381
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*Nset, nset=Set-7
   19,   20,   21,   22,   23,   24
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*Elset, elset=Set-7
 451, 452, 453, 454, 455, 456
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** Section: sand
*Solid Section, elset=Set-1, material=sand
,
** Section: clayclayer-1
*Solid Section, elset=Set-2, material=Claylayer1
,
** Section: claylayer-2
*Solid Section, elset=Set-3, material=Claylayer2
,
** Section: claylayer-3
*Solid Section, elset=Set-4, material=Claylayer3
,
** Section: claylayer-4
*Solid Section, elset=Set-5, material=Claylayer4
,
** Section: claylayer-5
*Solid Section, elset=Set-6, material=Claylayer5
,
** Section: claylayer-6
*Solid Section, elset=Set-7, material=Claylayer6
,
*End Part
**
**
** ASSEMBLY
**
*Assembly, name=Assembly
**
*Instance, name=Part-1-1, part=Part-1
        -15.,          -7.,           0.
*End Instance
**
*Nset, nset=Set-1, instance=Part-1-1, generate
    1,  2643,     1
*Elset, elset=Set-1, instance=Part-1-1, generate
   1,  840,    1
*Nset, nset=Set-2, instance=Part-1-1
   22,   23,   24,   26,  232,  233
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*Elset, elset=Set-2, instance=Part-1-1
 453, 456, 459, 462, 465, 468
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*Nset, nset=Set-3, instance=Part-1-1
    3,    4,    8,   11,   14,   17
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*Elset, elset=Set-3, instance=Part-1-1
  43,  44,  45, 118, 119, 120
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*Nset, nset=Set-4, instance=Part-1-1
    1,    4,    5,   22,   23,   24
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*Elset, elset=Set-4, instance=Part-1-1
   1,   4,   7,  10,  13,  16
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*Nset, nset=Set-5, instance=Part-1-1
    1,    2,    3,    4,    5,    6
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*Elset, elset=Set-5, instance=Part-1-1
   1,   2,   3,   4,   5,   6
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*Nset, nset=Set-6, instance=Part-1-1
    2,    3,    6,    7,    8,    9
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*Elset, elset=Set-6, instance=Part-1-1
  76,  77,  78,  79,  80,  81
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*Nset, nset=Set-7, instance=Part-1-1
    7,    8,    9,   10,   11,   12
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*Elset, elset=Set-7, instance=Part-1-1
 151, 152, 153, 154, 155, 156
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*Nset, nset=Set-8, instance=Part-1-1
   10,   11,   12,   13,   14,   15
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*Elset, elset=Set-8, instance=Part-1-1
 226, 227, 228, 229, 230, 231
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*Nset, nset=Set-9, instance=Part-1-1
   13,   14,   15,   16,   17,   18
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*Elset, elset=Set-9, instance=Part-1-1
 301, 302, 303, 304, 305, 306
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*Nset, nset=Set-10, instance=Part-1-1
   16,   17,   18,   19,   20,   21
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*Elset, elset=Set-10, instance=Part-1-1
 376, 377, 378, 379, 380, 381
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*Nset, nset=Set-11, instance=Part-1-1
   19,   20,   21,   22,   23,   24
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*Elset, elset=Set-11, instance=Part-1-1
 451, 452, 453, 454, 455, 456
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*Nset, nset=Set-12, instance=Part-1-1
    1,    2,    3,    4,    5,    6
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*Elset, elset=Set-12, instance=Part-1-1
   1,   2,   3,   4,   5,   6
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*Nset, nset=Set-13, instance=Part-1-1
    2,    3,    6,    7,    8,    9
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*Elset, elset=Set-13, instance=Part-1-1
  76,  77,  78,  79,  80,  81
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*Nset, nset=Set-14, instance=Part-1-1
    7,    8,    9,   10,   11,   12
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*Elset, elset=Set-14, instance=Part-1-1
 151, 152, 153, 154, 155, 156
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*Nset, nset=Set-15, instance=Part-1-1
   10,   11,   12,   13,   14,   15
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*Elset, elset=Set-15, instance=Part-1-1
 226, 227, 228, 229, 230, 231
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*Nset, nset=Set-16, instance=Part-1-1
   13,   14,   15,   16,   17,   18
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*Elset, elset=Set-16, instance=Part-1-1
 301, 302, 303, 304, 305, 306
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*Nset, nset=Set-17, instance=Part-1-1
   16,   17,   18,   19,   20,   21
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*Elset, elset=Set-17, instance=Part-1-1
 376, 377, 378, 379, 380, 381
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*Nset, nset=Set-18, instance=Part-1-1
   19,   20,   21,   22,   23,   24
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*Elset, elset=Set-18, instance=Part-1-1
 451, 452, 453, 454, 455, 456
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*Elset, elset=_Surf-1_S4, internal, instance=Part-1-1, generate
 46,  73,   3
*Surface, type=ELEMENT, name=Surf-1
_Surf-1_S4, S4
*Nset, nset=Set-4_PP_, internal, instance=Part-1-1
   1,   4,   5,  22,  23,  24
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*End Assembly
*Amplitude, name=Amp-1, time=TOTAL TIME
             0.,              0.,              1.,              0.,            1.01,              1.,           1e+20,              1.
**
** MATERIALS
**
*Material, name=Claylayer1
*Clay Plasticity
 0.1174,   1.5,18000.,    1.,    1.
*Density
1900.,
*Permeability, specific=9810.
 6e-12, 1.5
*Porous Elastic
 0.01, 0.28,   0.
*Material, name=Claylayer2
*Clay Plasticity
 0.1174,   1.5,27500.,    1.,    1.
*Density
1900.,
*Permeability, specific=9810.
 6e-12, 1.5
*Porous Elastic
 0.01, 0.28,   0.
*Material, name=Claylayer3
*Clay Plasticity
 0.1174,   1.5,36600.,    1.,    1.
*Density
1900.,
*Permeability, specific=9810.
 6e-12, 1.5
*Porous Elastic
 0.01, 0.28,   0.
*Material, name=Claylayer4
*Clay Plasticity
 0.1174,   1.5,46500.,    1.,    1.
*Density
1900.,
*Permeability, specific=9810.
 6e-12, 1.5
*Porous Elastic
 0.01, 0.28,   0.
*Material, name=Claylayer5
*Clay Plasticity
 0.1174,   1.5,55140.,    1.,    1.
*Density
1900.,
*Permeability, specific=9810.
 6e-12, 1.5
*Porous Elastic
 0.01, 0.28,   0.
*Material, name=Claylayer6
*Clay Plasticity
 0.1174,   1.5,64300.,    1.,    1.
*Density
1900.,
*Permeability, specific=9810.
 6e-12, 1.5
*Porous Elastic
 0.01, 0.28,   0.
*Material, name=sand
*Density
1900.,
*Elastic
13780., 0.3
*Permeability, specific=9810.
6., 0.8
**
** BOUNDARY CONDITIONS
**
** Name: BC-1 Type: Displacement/Rotation
*Boundary
Set-2, 1, 1
Set-2, 2, 2
** Name: BC-2 Type: Displacement/Rotation
*Boundary
Set-3, 1, 1
**
** PREDEFINED FIELDS
**
** Name: Predefined Field-8   Type: Geostatic stress
*Initial Conditions, type=STRESS, GEOSTATIC
Set-12, 0., 0., -9190., -1., 1., 1.
** Name: Predefined Field-9   Type: Geostatic stress
*Initial Conditions, type=STRESS, GEOSTATIC
Set-13, -9190., -1., -18380., -2., 1., 1.
** Name: Predefined Field-10   Type: Geostatic stress
*Initial Conditions, type=STRESS, GEOSTATIC
Set-14, -18380., -2., 27570., -3., 1., 1.
** Name: Predefined Field-11   Type: Geostatic stress
*Initial Conditions, type=STRESS, GEOSTATIC
Set-15, -27570., -3., 36760., -4., 1., 1.
** Name: Predefined Field-12   Type: Geostatic stress
*Initial Conditions, type=STRESS, GEOSTATIC
Set-16, -36760., -4., -45950., -5., 1., 1.
** Name: Predefined Field-13   Type: Geostatic stress
*Initial Conditions, type=STRESS, GEOSTATIC
Set-17, -45950., -5., -55140., -6., 1., 1.
** Name: Predefined Field-14   Type: Geostatic stress
*Initial Conditions, type=STRESS, GEOSTATIC
Set-18, -55140., -6., -64330., -7., 1., 1.
** Name: void-ratio-clay1M   Type: Void ratio
*Initial Conditions, TYPE=RATIO
Set-6, 1.42
** Name: void-ratioclay2M   Type: Void ratio
*Initial Conditions, TYPE=RATIO
Set-7, 1.37
** Name: void-rato-sandM   Type: Void ratio
*Initial Conditions, TYPE=RATIO
Set-5, 1.5
** Name: voidratio-clay3   Type: Void ratio
*Initial Conditions, TYPE=RATIO
Set-8, 1.34
** Name: voidratio-clay4   Type: Void ratio
*Initial Conditions, TYPE=RATIO
Set-9, 1.31
** Name: voidratio-clay5   Type: Void ratio
*Initial Conditions, TYPE=RATIO
Set-10, 1.29
** Name: voidratio-clay6   Type: Void ratio
*Initial Conditions, TYPE=RATIO
Set-11, 1.27
** ----------------------------------------------------------------
**
** STEP: ownwieghtsoilM
**
*Step, name=ownwieghtsoilM, nlgeom=YES, unsymm=YES
*Geostatic
**
** OUTPUT REQUESTS
**
*Restart, write, frequency=0
**
** FIELD OUTPUT: F-Output-1
**
*Output, field, variable=PRESELECT
**
** HISTORY OUTPUT: H-Output-1
**
*Output, history, variable=PRESELECT
*End Step
** ----------------------------------------------------------------
**
** STEP: striplaoadingM
**
*Step, name=striplaoadingM, nlgeom=YES, inc=1, unsymm=YES
*Soils, consolidation, end=PERIOD
1e-05, 1e-05, , ,
**
** LOADS
**
** Name: stripload100   Type: Pressure
*Dsload
Surf-1, P, 100000.
**
** OUTPUT REQUESTS
**
*Restart, write, frequency=0
**
** FIELD OUTPUT: F-Output-1
**
*Output, field, variable=PRESELECT
**
** HISTORY OUTPUT: H-Output-1
**
*Output, history, variable=PRESELECT
*End Step
** ----------------------------------------------------------------
**
** STEP: consolditonM
**
*Step, name=consolditonM, nlgeom=YES, inc=100000, unsymm=YES
*Soils, consolidation, end=PERIOD, utol=100000.
0.005, 1e+12, 1e-08, 1e+11,
**
** BOUNDARY CONDITIONS
**
** Name: BC-3 Type: Pore pressure
*Boundary, amplitude=Amp-1
Set-4_PP_, 8, 8
**
** LOADS
**
** Name: body-forec   Type: Body force
*Dload
Set-1, BY, -9190.
**
** OUTPUT REQUESTS
**
*Restart, write, frequency=0
**
** FIELD OUTPUT: F-Output-1
**
*Output, field, variable=PRESELECT
**
** HISTORY OUTPUT: H-Output-1
**
*Output, history, variable=PRESELECT
*End Step
